# NUFEB simulation

atom_style	bio
atom_modify	map array sort 100 5.0e-7
boundary	pp pp ff
newton		off
processors  * * 1

comm_modify	vel yes
read_data_bio atom.in

group HET type 1
group EPS type 2

neighbor	5e-7 bin
neigh_modify	delay 0 one 5000

##############Define DEM Variables&Commands##############

pair_style  gran/hooke/history 1.e-4 NULL 1.e-5 NULL 0.0 1
pair_coeff  * *

timestep 10

fix 1 all nve/limit 1e-8
fix fv all viscous 1e-5

fix zw all wall/gran hooke/history 2000 NULL 500.0 NULL 1.5 0 zplane  0.0  1e-04

variable kanc equal 50

fix zwa all walladh v_kanc zplane  0.0  1e-04

##############Define IBm Variables##############

#variables used in fix eps_extract
variable EPSdens equal 30
variable EPSratio equal 1.3

#variables used in fix division
variable divDia equal 1.36e-6

#variables used in fix kinetics
variable diffT equal 1e-4
variable tol equal 1e-6
variable layer equal -1

#variables used in fix death
variable deadDia equal 9e-7


##############Define IBm Commands##############

fix k1 all kinetics 100 25 10 25 v_diffT v_layer niter 5000
fix kgm all kinetics/growth/monod epsdens 30
fix g1 all kinetics/diffusion v_tol dcflag 2
fix d1 all divide 100 v_EPSdens v_divDia 64564
fix e1 HET eps_extract 100 v_EPSratio v_EPSdens 53453

##############Define IBm Computes##############

compute myNtypes all ntypes
compute myMass all biomass
compute myCon all avg_con
compute myHeight all avg_height
compute myRough all roughness

##############Simulation Output##############

dump		id all custom 1000 output.lammps id type diameter x y z
dump            du4 all bio/hdf5 100 dump.h5 id type x y z vx vy vz fx fy fz radius con upt yie spawner
#dump            du4 all bio/hdf5 1000 dump_%.h5 id type x y z vx vy vz fx fy fz radius con upt yie
#dump            du4 all bio/hdf5 1000 dump_*_%.h5 id type x y z vx vy vz fx fy fz radius con upt yie
thermo_style    custom step cpu atoms c_myNtypes[*] c_myMass[*] c_myCon[*]
thermo		100
thermo_modify	lost ignore


run 80000
